# OpenSim document version 30000
ForwardTool SimplePendulumMechanim_PI:
  model_file: SimplePendulumMechanism.osim
  replace_force_set: false
  force_set_files: dcmotor.xml
  results_directory: ./SimResultsPendulumPI
  output_precision: 8
  initial_time: 0
  final_time: 1
  solve_for_equilibrium_for_auxiliary_states: true
  maximum_number_of_integrator_steps: 20000
  maximum_integrator_step_size: 0.1
  minimum_integrator_step_size: 0.00001
  integrator_error_tolerance: 1e-9
  states_file: pendulum_initialState.sto
  use_specified_dt: false
  AnalysisSet Analyses:
    ForceReporter torqueReporter: start_time=-Inf end_time=Inf step_interval=1 in_degrees=false
        include_constraint_forces=false
  ControllerSet Controllers:
    # Cannot add controller here because it does not read correctly the file path I pass in as parameter
